*Heading
**--------------------------------------------------------------------
** Job name: EXAMPLE_MJC
** Generated by: David Morin
**--------------------------------------------------------------------
*Preprint, echo=NO, model=NO, history=NO, contact=NO
**--------------------------------------------------------------------
** PARTS
**--------------------------------------------------------------------
*Part, name=R2
*Node
      1,           0.,    2.7320509
      2,          2.5,    2.7320509
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*Element, type=CAX4R
  1,  59, 244, 243,  58
  2, 574, 568, 565, 575
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*Nset, nset=SYMY
   7,   8, 143, 144, 145, 146
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*Elset, elset=SYMY
 495, 496, 525, 526, 530, 532
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*Nset, nset=LOAD
  3,  4,  5, 66, 67, 68, 69, 70, 71, 72, 73, 74, 75
*Elset, elset=LOAD
   3,  50,  52,  53,  54,  55,  56,  58,  59, 438, 442
*Nset, nset=AXY
   1,   5,   6,   7,  76,  77
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*Elset, elset=AXY
  32,  33,  51,  58,  60,  66
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*Nset, nset=DIAMETER
 8,
*Nset, nset=NODES, generate
    1,  1694,     1
*Elset, elset=ELEMENTS, generate
    1,  1609,     1
*Solid Section, elset=ELEMENTS, material=EXAMPLE_MJC
,
*End Part
**--------------------------------------------------------------------
** ASSEMBLY
**--------------------------------------------------------------------
*Assembly, name=Assembly
**
*Instance, name=R2-1, part=R2
*End Instance
**
*Node
      2,           0.,         18.5,           0.
*Nset, nset=R2
 2,
*Surface, type=NODE, name=R2-1_LOAD_CNS_, internal
R2-1.LOAD, 1.
**--------------------------------------------------------------------
** Constraint: MPC
**--------------------------------------------------------------------
*MPC
BEAM, R2-1.LOAD, R2
*End Assembly
**--------------------------------------------------------------------
** Amplitude curve
**--------------------------------------------------------------------
*Amplitude, name=Amp-1, definition=SMOOTH STEP
             0.,          0.,         0.001,              1.
**--------------------------------------------------------------------
** MATERIALS
**--------------------------------------------------------------------
*material,name=EXAMPLE_MJC
*density
7.8e-9
*elastic
210000.0, 0.3
*specific heat
4.52e8,
*inelastic heat fraction
0.9,
*plastic, hardening=user, properties=16
** SIGMA0,      T1,    Q1,     T2,    Q2,    T3,     Q3, BLANK
    777.0,  3693.4, 125.2, 240.34, 2670.5,   0.0,    0.0,   0.0
**      C,   PDOT0,     m,     Tr,    Tm, BLANK,  BLANK, BLANK
     0.01,  0.0005,   1.0,  293.0, 1800.0,   0.0,    0.0,   0.0
*User defined field, properties=4
**  Wc, DCRIT,     Tc,    sTf
1492.0,   1.0, 1800.0,   0.95
*Depvar, delete=3
3,
1,PEEQ,"Equivalent plastic strain"
2,D,"Damage variable"
3,STATUS,"Failure status"
**--------------------------------------------------------------------
** BOUNDARY CONDITIONS
**--------------------------------------------------------------------
*Boundary
R2-1.AXY, 1, 1
R2-1.AXY, 6, 6
*Boundary
R2, 1, 1
R2, 6, 6
*Boundary
R2-1.SYMY, YSYMM
*initial conditions, type=temperature
R2-1.NODES, 293.0
**--------------------------------------------------------------------
** STEP
**--------------------------------------------------------------------
*Step, name=LOADING, nlgeom=YES
*Dynamic, Explicit, ADIABATIC
, 0.01
*Bulk Viscosity
0.06, 1.2
**--------------------------------------------------------------------
** BOUNDARY CONDITIONS
**--------------------------------------------------------------------
*Boundary, amplitude=Amp-1, type=VELOCITY
R2, 2, 2, 50.0
**--------------------------------------------------------------------
** OUTPUT REQUESTS
**--------------------------------------------------------------------
*Restart, write, number interval=1, time marks=NO
**--------------------------------------------------------------------
** FIELD OUTPUT
**--------------------------------------------------------------------
*Output, field, number interval=100
*Node Output
U,
*Element Output, directions=YES
PEEQ, S, SDV, STATUS, TEMP
**--------------------------------------------------------------------
** HISTORY OUTPUT
**--------------------------------------------------------------------
*Output, history, variable=PRESELECT
*Output, history, time interval=1e-5
*Node Output, nset=R2-1.DIAMETER
U1,
**
*Node Output, nset=R2
RF2, U2
*End Step
