*Heading
**--------------------------------------------------------------------
** Job name: EXAMPLE_VUSDFLD_V2
** Generated by: David Morin
**--------------------------------------------------------------------
*Preprint, echo=NO, model=NO, history=NO, contact=NO
**--------------------------------------------------------------------
** PARTS
**--------------------------------------------------------------------
*Part, name=PATCH
*NODE
1,0,0,0
2,0.5,0,0
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*Element, type=S4R
  1,  1,  2, 13, 12
  2,  2,  3, 14, 13
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*Nset, nset=SYMZ, generate
  1, 121, 1
*Nset, nset=CLAMP
1, 2, 3,4,5,6,7,8
9,10,11
*Nset, nset=SYMX
 1, 12, 23,34,45,56,67,78
89,100,111
*Nset, nset=LOAD
111,112,113,114,115,116,117,118
119,120,121
*Elset, elset=ELEMENTS, generate
 1,  100,  1
*Shell Section, elset=ELEMENTS, material=EXAMPLE_VUSDLFD_V2
0.5, 3
*End Part
**--------------------------------------------------------------------
** ASSEMBLY
**--------------------------------------------------------------------
*Assembly, name=Assembly
*Instance, name=PATCH-1, part=PATCH
*End Instance
*End Assembly
**--------------------------------------------------------------------
** MATERIALS
**--------------------------------------------------------------------
*material,name=EXAMPLE_VUSDLFD_V2
*density
7.8e-9
*elastic
210000.0, 0.3
*plastic
250.0, 0.0
350.0, 1.0
*User defined field
*Depvar, delete=3
3,
1,PEEQ,'Equivalent plastic strain'
2,D,'Damage variable'
3,STATUS,'Failure status'
**--------------------------------------------------------------------
** BOUNDARY CONDITIONS
**--------------------------------------------------------------------
*Boundary
PATCH-1.CLAMP, 1, 1
PATCH-1.CLAMP, 2, 2
PATCH-1.CLAMP, 4, 4
PATCH-1.CLAMP, 6, 6
*Boundary
PATCH-1.LOAD, 1, 1
PATCH-1.LOAD, 4, 4
PATCH-1.LOAD, 6, 6
*Boundary
PATCH-1.SYMX, 1, 1
PATCH-1.SYMX, 5, 5
PATCH-1.SYMX, 6, 6
*Boundary
PATCH-1.SYMZ, 3, 3
PATCH-1.SYMZ, 4, 4
PATCH-1.SYMZ, 5, 5
**--------------------------------------------------------------------
** STEP
**--------------------------------------------------------------------
*Step, name=LOADING, nlgeom=YES, inc=1000
*Static
0.001, 1., 1e-06, 0.01
*FIELD
**--------------------------------------------------------------------
** BOUNDARY CONDITIONS
**--------------------------------------------------------------------
*Boundary
PATCH-1.LOAD, 2, 2, 1.0
**--------------------------------------------------------------------
** OUTPUT REQUESTS
**--------------------------------------------------------------------
*Restart, write, number interval=1, time marks=NO
**--------------------------------------------------------------------
** FIELD OUTPUT
**--------------------------------------------------------------------
*Output, field
*Element Output, directions=YES
PEEQ, S, SDV, STATUS
*Node Output
U
**--------------------------------------------------------------------
** HISTORY OUTPUT
**--------------------------------------------------------------------
*Output, history, variable=PRESELECT
*Output, history
*Node Output, nset=PATCH-1.LOAD
RF2
*End Step
